*Heading
** Job name: Job-1 Model name: Model-1
** Generated by: Abaqus/CAE 2020
*Preprint, echo=NO, model=NO, history=NO, contact=NO
**
** PARTS
**
*Part, name=DCB
*Node
      1,           0.,           0.,        2000.
      2,   10.6066017,   4.39339828,        2000.
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*Element, type=S4R
   1,     1,    25,  7785,  1310
   2,    25,    26,  7786,  7785
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*Nset, nset=_PickedSet2, internal
     1,     2,     3,     4,     5,     6
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*Elset, elset=_PickedSet2, internal, generate
     1,  30720,      1
*Nset, nset=_PickedSet3, internal
     1,     4,    11,    12,    21,    22
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*Elset, elset=_PickedSet3, internal, generate
 30721,  37120,      1
*Orientation, name=Ori-2
1., 0., 0., 0., 1., 0.
2, 0.
** Section: Section-1
*Shell Section, elset=_PickedSet2, composite, orientation=Ori-2
0.04, 3, Material-1, 0., 1
0.04, 3, Material-1, 0., 2
0.04, 3, Material-1, 90., 3
0.04, 3, Material-1, 90., 4
0.04, 3, Material-1, 0., 5
0.04, 3, Material-1, 0., 6
*Orientation, name=Ori-1
1., 0., 0., 0., 1., 0.
2, 0.
** Section: Section-2
*Shell Section, elset=_PickedSet3, composite, orientation=Ori-1, symmetric
0.04, 3, Material-1, 0., 1
0.04, 3, Material-1, 0., 2
0.04, 3, Material-1, 90., 3
0.04, 3, Material-1, 90., 4
0.04, 3, Material-1, 0., 5
0.04, 3, Material-1, 0., 6
*End Part
**
*Part, name=plate1
*Node
      1,          70.,          10.,         140.
      2,          60.,           0.,         140.
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*Element, type=R3D4
 1,   1,   7, 114,  64
 2,   7,   8, 115, 114
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*Node
    465,          30.,           0.,         140.
*Nset, nset=plate1-RefPt_, internal
465,
*Elset, elset=plate1, generate
   1,  420,    1
*End Part
**
*Part, name=plate2
*Node
      1,          70.,         -10.,         140.
      2,          60.,           0.,         140.
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*Element, type=R3D4
 1,   1,   7, 114,  64
 2,   7,   8, 115, 114
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*Node
    465,          30.,           0.,         140.
*Nset, nset=plate2-RefPt_, internal
465,
*Elset, elset=plate2, generate
   1,  420,    1
*End Part
**
*Part, name=plate3
*Node
      1,          10.,           0.,         140.
      2,           5.,           0.,         140.
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*Element, type=R3D4
  1,   1,   2,   7,   6
  2,   2,   3,   8,   7
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*Node
    146,           0.,  -200.800003,         140.
*Nset, nset=plate3-RefPt_, internal
146,
*Elset, elset=plate3, generate
   1,  112,    1
*End Part
**
*Part, name=roller
*Node
      1,   199.751389,  -9.96917725,         140.
      2,   199.006149,  -19.9135685,         140.
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*Element, type=R3D4
   1,  126,    1,  127,  252
   2,    1,    2,  128,  127
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*Node
   1891,           0., -1.22464676e-14,         140.
*Nset, nset=roller-RefPt_, internal
1891,
*Elset, elset=roller, generate
    1,  1764,     1
*End Part
**
*Part, name=shaft
*Node
      1,    9.5949297,  -2.81732559,         140.
      2,   8.41253567,  -5.40640831,         140.
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*Element, type=R3D4
   1,   22,    1,   23,   44
   2,    1,    2,   24,   23
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*Node
   1101,           0., -6.123234e-16,         140.
*Nset, nset=shaft-RefPt_, internal
1101,
*Elset, elset=shaft, generate
    1,  1078,     1
*End Part
**
**
** ASSEMBLY
**
*Assembly, name=Assembly
**
*Instance, name=roller-1, part=roller
*End Instance
**
*Instance, name=plate3-1, part=plate3
          0.,        200.8,           0.
*End Instance
**
*Instance, name=DCB-1, part=DCB
        -10.,        200.4,          95.
        -10.,        200.4,          95.,         -10., 201.400000012688,          95., 89.9999992730282
*End Instance
**
*Instance, name=plate1-1, part=plate1
        -10.,        209.4,           0.
*End Instance
**
*Instance, name=plate2-1, part=plate2
        -10.,        191.4,           0.
*End Instance
**
*Instance, name=shaft-1, part=shaft
          0.,        213.5,           0.
*End Instance
**
*Instance, name=shaft-1-rad-2, part=shaft
     -106.75, 184.896423707978,           0.
     -106.75, 184.896423707978,           0.,      -106.75, 184.896423707978, 0.999999991937338, 30.00000047109
*End Instance
**
*Instance, name=shaft-1-rad-3, part=shaft
-184.896423707978,       106.75,           0.
-184.896423707978,       106.75,           0., -184.896423707978,       106.75,           1., 60.0000008905841
*End Instance
**
*Instance, name=shaft-1-rad-4, part=shaft
      -213.5, 1.3073104580898e-14,           0.
      -213.5, 1.3073104580898e-14,           0.,       -213.5, 1.3073104580898e-14, 1.00000001268805, 89.9999992730282
*End Instance
**
*Instance, name=shaft-1-rad-5, part=shaft
-184.896423707978,      -106.75,           0.
-184.896423707978,      -106.75,           0., -184.896423707978,      -106.75, 0.999999982051769,         120.
*End Instance
**
*Instance, name=shaft-1-rad-6, part=shaft
     -106.75, -184.896423707978,           0.
     -106.75, -184.896423707978,           0.,      -106.75, -184.896423707978, 1.00000000608948, 149.999999585438
*End Instance
**
*Instance, name=shaft-1-rad-7, part=shaft
-2.6146209161796e-14,       -213.5,           0.
-2.6146209161796e-14,       -213.5,           0., -2.6146209161796e-14,       -213.5,           1.,         180.
*End Instance
**
*Instance, name=shaft-1-rad-8, part=shaft
      106.75, -184.896423707978,           0.
      106.75, -184.896423707978,           0.,       106.75, -184.896423707978, 1.00000000608948, 210.000000414563
*End Instance
**
*Instance, name=shaft-1-rad-9, part=shaft
184.896423707978,      -106.75,           0.
184.896423707978,      -106.75,           0., 184.896423707978,      -106.75, 0.999999982051769,         240.
*End Instance
**
*Instance, name=shaft-1-rad-10, part=shaft
       213.5, -3.9219313742694e-14,           0.
       213.5, -3.9219313742694e-14,           0.,        213.5, -3.9219313742694e-14, -1.00000001268805, 89.9999992730282
*End Instance
**
*Instance, name=shaft-1-rad-11, part=shaft
184.896423707978,       106.75,           0.
184.896423707978,       106.75,           0., 184.896423707978,       106.75,          -1., 60.0000008905841
*End Instance
**
*Instance, name=shaft-1-rad-12, part=shaft
      106.75, 184.896423707978,           0.
      106.75, 184.896423707978,           0.,       106.75, 184.896423707978, -0.999999991937338, 30.00000047109
*End Instance
**
*Nset, nset=Set-7, instance=shaft-1
 1101,
*Nset, nset=Set-7, instance=shaft-1-rad-2
 1101,
*Nset, nset=Set-7, instance=shaft-1-rad-3
 1101,
*Nset, nset=Set-7, instance=shaft-1-rad-5
 1101,
*Nset, nset=Set-7, instance=shaft-1-rad-9
 1101,
*Nset, nset=Set-7, instance=shaft-1-rad-7
 1101,
*Nset, nset=Set-7, instance=shaft-1-rad-11
 1101,
*Nset, nset=Set-7, instance=shaft-1-rad-4
 1101,
*Nset, nset=Set-7, instance=shaft-1-rad-6
 1101,
*Nset, nset=Set-7, instance=shaft-1-rad-10
 1101,
*Nset, nset=Set-7, instance=shaft-1-rad-8
 1101,
*Nset, nset=Set-7, instance=shaft-1-rad-12
 1101,
*Nset, nset=Set-8, instance=DCB-1, generate
     1,  37178,      1
*Elset, elset=Set-8, instance=DCB-1, generate
     1,  37120,      1
*Nset, nset=_PickedSet51, internal, instance=DCB-1
 21, 23
*Nset, nset=_PickedSet52, internal, instance=plate1-1
 465,
*Nset, nset=_PickedSet53, internal, instance=plate2-1
 465,
*Nset, nset=_PickedSet55, internal, instance=roller-1
 1891,
*Nset, nset=_PickedSet56, internal, instance=plate3-1
 146,
*Elset, elset=_DCB_, internal, instance=DCB-1, generate
     1,  37120,      1
*Surface, type=ELEMENT, name=DCB
_DCB_,
*Elset, elset=_DCB_bottom_SPOS, internal, instance=DCB-1, generate
 15361,  37120,      1
*Surface, type=ELEMENT, name=DCB_bottom
_DCB_bottom_SPOS, SPOS
*Elset, elset=_DCB_top_SPOS, internal, instance=DCB-1, generate
     1,  15360,      1
*Elset, elset=_DCB_top_SNEG, internal, instance=DCB-1, generate
 30721,  37120,      1
*Surface, type=ELEMENT, name=DCB_top
_DCB_top_SPOS, SPOS
_DCB_top_SNEG, SNEG
*Elset, elset=_plate1_bottom_SPOS, internal, instance=plate1-1, generate
   1,  420,    1
*Surface, type=ELEMENT, name=plate1_bottom
_plate1_bottom_SPOS, SPOS
*Elset, elset=_plate2_top_SNEG, internal, instance=plate2-1, generate
   1,  420,    1
*Surface, type=ELEMENT, name=plate2_top
_plate2_top_SNEG, SNEG
*Elset, elset=_plate3_bottom_SPOS, internal, instance=plate3-1, generate
   1,  112,    1
*Surface, type=ELEMENT, name=plate3_bottom
_plate3_bottom_SPOS, SPOS
*Elset, elset=_roller_SPOS, internal, instance=roller-1, generate
    1,  1764,     1
*Surface, type=ELEMENT, name=roller
_roller_SPOS, SPOS
*Elset, elset=_shaft_SPOS, internal, instance=shaft-1, generate
    1,  1078,     1
*Elset, elset=_shaft_SPOS, internal, instance=shaft-1-rad-2, generate
    1,  1078,     1
*Elset, elset=_shaft_SPOS, internal, instance=shaft-1-rad-3, generate
    1,  1078,     1
*Elset, elset=_shaft_SPOS, internal, instance=shaft-1-rad-5, generate
    1,  1078,     1
*Elset, elset=_shaft_SPOS, internal, instance=shaft-1-rad-9, generate
    1,  1078,     1
*Elset, elset=_shaft_SPOS, internal, instance=shaft-1-rad-7, generate
    1,  1078,     1
*Elset, elset=_shaft_SPOS, internal, instance=shaft-1-rad-11, generate
    1,  1078,     1
*Elset, elset=_shaft_SPOS, internal, instance=shaft-1-rad-4, generate
    1,  1078,     1
*Elset, elset=_shaft_SPOS, internal, instance=shaft-1-rad-6, generate
    1,  1078,     1
*Elset, elset=_shaft_SPOS, internal, instance=shaft-1-rad-10, generate
    1,  1078,     1
*Elset, elset=_shaft_SPOS, internal, instance=shaft-1-rad-8, generate
    1,  1078,     1
*Elset, elset=_shaft_SPOS, internal, instance=shaft-1-rad-12, generate
    1,  1078,     1
*Surface, type=ELEMENT, name=shaft
_shaft_SPOS, SPOS
*Rigid Body, ref node=roller-1.roller-RefPt_, elset=roller-1.roller
*Rigid Body, ref node=plate3-1.plate3-RefPt_, elset=plate3-1.plate3
*Rigid Body, ref node=plate1-1.plate1-RefPt_, elset=plate1-1.plate1
*Rigid Body, ref node=plate2-1.plate2-RefPt_, elset=plate2-1.plate2
*Rigid Body, ref node=shaft-1.shaft-RefPt_, elset=shaft-1.shaft
*Rigid Body, ref node=shaft-1-rad-2.shaft-RefPt_, elset=shaft-1-rad-2.shaft
*Rigid Body, ref node=shaft-1-rad-3.shaft-RefPt_, elset=shaft-1-rad-3.shaft
*Rigid Body, ref node=shaft-1-rad-4.shaft-RefPt_, elset=shaft-1-rad-4.shaft
*Rigid Body, ref node=shaft-1-rad-5.shaft-RefPt_, elset=shaft-1-rad-5.shaft
*Rigid Body, ref node=shaft-1-rad-6.shaft-RefPt_, elset=shaft-1-rad-6.shaft
*Rigid Body, ref node=shaft-1-rad-7.shaft-RefPt_, elset=shaft-1-rad-7.shaft
*Rigid Body, ref node=shaft-1-rad-8.shaft-RefPt_, elset=shaft-1-rad-8.shaft
*Rigid Body, ref node=shaft-1-rad-9.shaft-RefPt_, elset=shaft-1-rad-9.shaft
*Rigid Body, ref node=shaft-1-rad-10.shaft-RefPt_, elset=shaft-1-rad-10.shaft
*Rigid Body, ref node=shaft-1-rad-11.shaft-RefPt_, elset=shaft-1-rad-11.shaft
*Rigid Body, ref node=shaft-1-rad-12.shaft-RefPt_, elset=shaft-1-rad-12.shaft
*End Assembly
*Amplitude, name=Amp-1, definition=SMOOTH STEP
             0.,              0.,             0.4,              1.
*Amplitude, name=Amp-2, definition=SMOOTH STEP
             0.,              0.,              8.,              1.
**
** MATERIALS
**
*Material, name=Material-1
*Density
 1.4316e-09,
*Elastic, type=LAMINA
137518.,  4434.5,  0.3202,  1783.4,  1783.4,  1635.4,     50.
137566., 4868.88,  0.3202,   1958.,   1958.,   1796.,     55.
137614.,   5302.,  0.3202,   2132.,   2132.,  1955.6,     60.
137662.,   5733.,  0.3202,   2305.,   2305.,   2115.,     65.
137711.,   6162.,  0.3202,   2478.,   2478.,   2274.,     70.
137759.,  6590.4,  0.3202,  2649.5,  2649.5,  2431.7,     75.
137807.,   7017.,  0.3202,   2821.,   2821.,   2589.,     80.
137885.,   7442.,  0.3202,   2991.,   2991.,   2746.,     85.
137903.,   7865.,  0.3202,   3161.,   3161.,   2903.,     90.
137951.,   8287.,  0.3202,   3330.,   3330.,   3059.,     95.
137999.,  8707.3,  0.3202,  3499.1,  3499.1,  3214.3,    100.
**
** INTERACTION PROPERTIES
**
*Surface Interaction, name=bond
*Friction, rough
*Surface Behavior, no separation, pressure-overclosure=HARD
*Surface Interaction, name=firc
*Friction
 0.1,
*Surface Behavior, pressure-overclosure=HARD
*Surface Interaction, name=fric-small
*Friction
 0.01,
*Surface Behavior, pressure-overclosure=HARD
**
** BOUNDARY CONDITIONS
**
** Name: DCB Type: Displacement/Rotation
*Boundary
_PickedSet51, 2, 2
_PickedSet51, 3, 3
** Name: plate1 Type: Displacement/Rotation
*Boundary
_PickedSet52, 1, 1
_PickedSet52, 2, 2
_PickedSet52, 3, 3
_PickedSet52, 4, 4
_PickedSet52, 5, 5
_PickedSet52, 6, 6
** Name: plate2 Type: Displacement/Rotation
*Boundary
_PickedSet53, 1, 1
_PickedSet53, 2, 2
_PickedSet53, 3, 3
_PickedSet53, 4, 4
_PickedSet53, 5, 5
_PickedSet53, 6, 6
** Name: plate3 Type: Displacement/Rotation
*Boundary
_PickedSet56, 1, 1
_PickedSet56, 2, 2
_PickedSet56, 3, 3
_PickedSet56, 4, 4
_PickedSet56, 5, 5
_PickedSet56, 6, 6
** Name: roller Type: Displacement/Rotation
*Boundary
_PickedSet55, 1, 1
_PickedSet55, 2, 2
_PickedSet55, 3, 3
_PickedSet55, 4, 4
_PickedSet55, 5, 5
_PickedSet55, 6, 6
** Name: shaft Type: Displacement/Rotation
*Boundary
Set-7, 1, 1
Set-7, 2, 2
Set-7, 3, 3
Set-7, 4, 4
Set-7, 5, 5
Set-7, 6, 6
**
** PREDEFINED FIELDS
**
** Name: Predefined Field-1   Type: Temperature
*Initial Conditions, type=TEMPERATURE
Set-8, 100.
**
** INTERACTIONS
**
** Interaction: Int-1
*Contact, op=NEW
*Contact Inclusions
DCB ,
DCB_top , plate1_bottom
DCB_bottom , plate2_top
*Contact Property Assignment
 ,  , firc
** ----------------------------------------------------------------
**
** STEP: Step-1
**
*Step, name=Step-1, nlgeom=YES
*Dynamic, Explicit
, 0.4
*Bulk Viscosity
0.06, 1.2
** Mass Scaling: Semi-Automatic
**               Whole Model
*Variable Mass Scaling, dt=1e-06, type=below min, frequency=1
**
** BOUNDARY CONDITIONS
**
** Name: plate1 Type: Displacement/Rotation
*Boundary, amplitude=Amp-1
_PickedSet52, 1, 1
_PickedSet52, 2, 2, -8.65
_PickedSet52, 3, 3
_PickedSet52, 4, 4
_PickedSet52, 5, 5
_PickedSet52, 6, 6
** Name: plate2 Type: Displacement/Rotation
*Boundary, amplitude=Amp-1
_PickedSet53, 1, 1
_PickedSet53, 2, 2, 8.65
_PickedSet53, 3, 3
_PickedSet53, 4, 4
_PickedSet53, 5, 5
_PickedSet53, 6, 6
**
** OUTPUT REQUESTS
**
*Restart, write, overlay, number interval=1, time marks=YES
**
** FIELD OUTPUT: F-Output-1
**
*Output, field, variable=PRESELECT, time interval=0.01
**
** HISTORY OUTPUT: H-Output-1
**
*Output, history, variable=PRESELECT, time interval=0.01
*End Step
** ----------------------------------------------------------------
**
** STEP: Step-2
**
*Step, name=Step-2, nlgeom=YES
*Dynamic, Explicit
, 0.4
*Bulk Viscosity
0.06, 1.2
** Mass Scaling: Semi-Automatic
**               Whole Model
*Variable Mass Scaling, dt=1e-06, type=below min, frequency=1
**
** INTERACTIONS
**
** Interaction: Int-1
*Contact, op=NEW
*Contact Inclusions
DCB ,
DCB_top , plate3_bottom
DCB_top , shaft
DCB_bottom , roller
*Contact Property Assignment
 ,  , fric-small
DCB_top , plate3_bottom , bond
**
** OUTPUT REQUESTS
**
*Restart, write, overlay, number interval=1, time marks=YES
**
** FIELD OUTPUT: F-Output-1
**
*Output, field, variable=PRESELECT, time interval=0.01
**
** HISTORY OUTPUT: H-Output-1
**
*Output, history, variable=PRESELECT, time interval=0.01
*End Step
** ----------------------------------------------------------------
**
** STEP: Step-3
**
*Step, name=Step-3, nlgeom=YES
*Dynamic, Explicit
, 8.
*Bulk Viscosity
0.06, 1.2
** Mass Scaling: Semi-Automatic
**               Whole Model
*Variable Mass Scaling, dt=1e-06, type=below min, frequency=1
**
** BOUNDARY CONDITIONS
**
** Name: plate3 Type: Displacement/Rotation
*Boundary, amplitude=Amp-2
_PickedSet56, 1, 1
_PickedSet56, 2, 2
_PickedSet56, 3, 3
_PickedSet56, 4, 4
_PickedSet56, 5, 5
_PickedSet56, 6, 6, 9.42
** Name: roller Type: Displacement/Rotation
*Boundary, amplitude=Amp-2
_PickedSet55, 1, 1
_PickedSet55, 2, 2
_PickedSet55, 3, 3
_PickedSet55, 4, 4
_PickedSet55, 5, 5
_PickedSet55, 6, 6, 9.42
**
** OUTPUT REQUESTS
**
*Restart, write, overlay, number interval=1, time marks=YES
**
** FIELD OUTPUT: F-Output-1
**
*Output, field, variable=PRESELECT, time interval=0.01
**
** HISTORY OUTPUT: H-Output-1
**
*Output, history, variable=PRESELECT, time interval=0.01
*End Step
